** written by FreeCAD inp file writer for CalculiX,Abaqus meshes
** highest dimension mesh elements only.

** Nodes
*Node, NSET=Nall
1, 26.99999999999, 10, 2
2, 26.99999999999, 10, 0
3, 50, 10, 2
4, 50, 10, 0
5, 50, 0, 2
6, 50, 0, 0
7, 0, 0, 2
8, 0, 0, 0
9, 0, 20, 2
10, 0, 20, 0
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

** Volume elements
*Element, TYPE=C3D10, ELSET=Evolumes
1240, 496, 256, 267, 448, 2178, 1221, 2180, 1831, 2179, 2181
1241, 166, 358, 167, 35, 2182, 2183, 764, 759, 2184, 763
1242, 151, 342, 406, 343, 2185, 1554, 2186, 2187, 1361, 1555
1243, 133, 67, 198, 132, 2045, 858, 2188, 679, 2046, 2189
1244, 177, 45, 176, 368, 794, 790, 795, 2191, 2190, 2192
1245, 242, 435, 434, 486, 2193, 1645, 2194, 2195, 1801, 1800
1246, 66, 196, 197, 131, 850, 855, 854, 2067, 2196, 2197
1247, 391, 199, 200, 255, 2198, 865, 2199, 2200, 1037, 1036
1248, 347, 155, 411, 410, 2201, 2202, 1569, 1567, 2203, 1571
1249, 539, 336, 524, 525, 2204, 2205, 2002, 2003, 2206, 1955
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
** Define element set Eall
*ELSET, ELSET=Eall
Evolumes


***********************************************************
** Element sets for materials and FEM element type (solid, shell, beam, fluid)
** written by write_element_sets_material_and_femelement_type function
*ELSET,ELSET=SolidMaterialSolid
Evolumes

***********************************************************
** Node sets for prescribed displacement constraint
** written by write_node_sets_constraints_displacement function
** FemConstraintDisplacement
*NSET,NSET=FemConstraintDisplacement
5,
6,
7,
8,
2074,
2075,
2076,
2077,
2078,
2079,
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** FemConstraintDisplacement001
*NSET,NSET=FemConstraintDisplacement001
640,
641,
642,
643,
644,
645,
646,
7,
8,
9,
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** FemConstraintDisplacement002
*NSET,NSET=FemConstraintDisplacement002
1,
2,
3,
4,
5,
6,
7,
8,
9,
10,
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
***********************************************************
** Materials
** written by write_materials function
** Young's modulus unit is MPa = N/mm2
** FreeCAD material name: CalculiX-Steel
** SolidMaterial
*MATERIAL, NAME=SolidMaterial
*ELASTIC
210000, 0.300

***********************************************************
** Sections
** written by write_femelementsets function
*SOLID SECTION, ELSET=SolidMaterialSolid, MATERIAL=SolidMaterial


**manually added design nodes
*Nset, nset=DESIGNNODES
1, 2, 2049, 2050, 2051, 2052, 2053, 2054,
2055, 2056, 2057, 2058, 13, 14, 15, 16,
17, 2059, 2060, 2061, 2062, 2063, 2064,
544, 545, 549, 550, 551, 552, 69, 70,
71, 72, 73, 74, 75, 76, 77, 78,
79, 80, 81, 82, 609, 610, 611, 612,
613, 614, 615, 616, 617, 618, 619, 620,
621, 622, 623, 624, 2167, 2168, 2169,
2170, 2171, 2172, 2173, 2174, 2175, 2176,
2177, 134, 135, 136, 137, 138, 139, 140,
141, 142, 143, 144, 145, 146, 681, 682,
683, 684, 685, 686, 687, 688, 689, 690,
691, 692, 693, 694, 695, 696, 2031, 2032,
2033, 2034, 2035, 2036, 2037, 2038, 2039, 2040,
2042, 2043, 2044
*DESIGNVARIABLES,TYPE=COORDINATE
DESIGNNODES


***********************************************************
** At least one step is needed to run an CalculiX analysis of FreeCAD
** written by write_step_begin function
*STEP
*STATIC


***********************************************************
** Displacement constraint applied
** written by write_constraints_displacement function
** FemConstraintDisplacement
*BOUNDARY
FemConstraintDisplacement,2
** FemConstraintDisplacement001
*BOUNDARY
FemConstraintDisplacement001,1
** FemConstraintDisplacement002
*BOUNDARY
FemConstraintDisplacement002,3


***********************************************************
** Element + CalculiX face + load in [MPa]
** written by write_constraints_pressure function
** FemConstraintPressure
*DLOAD
** FemConstraintPressure: face load
1252,P2,-100.0
1395,P2,-100.0
1768,P1,-100.0
1834,P2,-100.0
2012,P2,-100.0
2331,P4,-100.0
2581,P3,-100.0
2612,P1,-100.0
2644,P2,-100.0
2645,P4,-100.0

***********************************************************
** Outputs --> frd file
** written by write_outputs_types function
*NODE FILE
U
*EL FILE
S

***********************************************************
** written by write_step_end function
*END STEP

***********************************************************
** CalculiX Input file
** written by write_footer function
**   written by    --> FreeCAD 0.18.15860 (Git)
**   written on    --> Fri Feb 22 07:24:13 2019
**   file name     --> geometry.FCStd
**   analysis name --> Analysis
**
**
**
**   Units
**
**   Geometry (mesh data)        --> mm
**   Materials (Young's modulus) --> N/mm2 = MPa
**   Loads (nodal loads)         --> N
**


**manually added step
*STEP
*SENSITIVITY
*OBJECTIVE
STRESS,DESIGNNODES,10.,200.
*FILTER,TYPE=LINEAR,DIRECTION WEIGHTING=YES
3.
*NODE FILE
SEN
*END STEP
